*HEADING
Linear Elastic Diamond 2 TPMS.
1000 mm cell size, 212.532 mm shell thickness, Youngs modulus: 180.000 (GPa), Poisson ratio: 0.300 (GPa)
S.I. Units (meters, Newtons, sec, kilograms)
**
*NODE
1,  0.25000000,  0.00000000,  0.50000000
**
** NODES OMITTED FOR SIMPLICITY
**
999011,    0,  0,  0
999022,    0,  0,  0
999033,    0,  0,  0
999023,    0,  0,  0
999013,    0,  0,  0
999012,    0,  0,  0
**
*NSET, NSET=DUMMY
999011,999022,999033,999023,999013,999012
**
*NSET, NSET=MIDDLE
7
**
*NSET, NSET=XLface, UNSORTED
2419,4783,2642,4199,2482,4782
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**
*NSET, NSET=XUface, UNSORTED
818,5774,1617,5622,1025,5811
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**
*NSET, NSET=YLface, UNSORTED
4002,4225,6332,4065,5756,4262
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**
*NSET, NSET=YUface, UNSORTED
821,3200,1051,2616,887,3199
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**
*NSET, NSET=ZLface, UNSORTED
4001,4224,6040,4064,5682,4261
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**
*NSET, NSET=ZUface, UNSORTED
3204,3434,5263,3270,4901,3471
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**
*ELEMENT, TYPE=S3, ELSET=EALL
1,  1,  528,  510
**
**ELEMENTS OMITTED FOR SIMPLICITY
**
** FACES
**
*EQUATION
5
XLface, 1, -1, XUface, 1, 1, 999011, 1, -1, 999012, 1, 0,
999013, 1, 0
*EQUATION
5
XLface, 2, -1, XUface, 2, 1, 999012, 1, -0.5, 999022, 1, 0,
999023, 1, 0
*EQUATION
5
XLface, 3, -1, XUface, 3, 1, 999013, 1, -0.5, 999023, 1, 0,
999033, 1, 0
**
*EQUATION
2
XLface, 4, -1, XUface, 4, 1
*EQUATION
2
XLface, 5, -1, XUface, 5, 1
*EQUATION
2
XLface, 6, -1, XUface, 6, 1
**
*EQUATION
5
YLface, 1, -1, YUface, 1, 1, 999011, 1, 0, 999012, 1, -0.5,
999013, 1, 0
*EQUATION
5
YLface, 2, -1, YUface, 2, 1, 999012, 1, 0, 999022, 1, -1,
999023, 1, 0
*EQUATION
5
YLface, 3, -1, YUface, 3, 1, 999013, 1, 0, 999023, 1, -0.5,
999033, 1, 0
**
*EQUATION
2
YLface, 4, -1, YUface, 4, 1
*EQUATION
2
YLface, 5, -1, YUface, 5, 1
*EQUATION
2
YLface, 6, -1, YUface, 6, 1
**
*EQUATION
5
ZLface, 1, -1, ZUface, 1, 1, 999011, 1, 0, 999012, 1, 0,
999013, 1, -0.5
*EQUATION
5
ZLface, 2, -1, ZUface, 2, 1, 999012, 1, 0, 999022, 1, 0,
999023, 1, -0.5
*EQUATION
5
ZLface, 3, -1, ZUface, 3, 1, 999013, 1, 0, 999023, 1, 0,
999033, 1, -1
**
*EQUATION
2
ZLface, 4, -1, ZUface, 4, 1
*EQUATION
2
ZLface, 5, -1, ZUface, 5, 1
*EQUATION
2
ZLface, 6, -1, ZUface, 6, 1
**
**
*SHELL GENERAL SECTION,ELSET=EALL,MATERIAL=MAT1
212.5324e-03
*MATERIAL, NAME=MAT1
*ELASTIC
180e09, 0.3
**
*BOUNDARY
MIDDLE, 1, 3, 0.0
**
*Step, perturbation, name=Step-1, nlgeom=NO
*Static
1., 1., 1e-05, 1.
**
*Load case, name=11only
*BOUNDARY
999011, 1, 1, 1
999022, 1, 1, 0
999033, 1, 1, 0
999023, 1, 1, 0
999013, 1, 1, 0
999012, 1, 1, 0
*End load case
*Load case, name=22only
*BOUNDARY
999011, 1, 1, 0
999022, 1, 1, 1
999033, 1, 1, 0
999023, 1, 1, 0
999013, 1, 1, 0
999012, 1, 1, 0
*End load case
*Load case, name=33only
*BOUNDARY
999011, 1, 1, 0
999022, 1, 1, 0
999033, 1, 1, 1
999023, 1, 1, 0
999013, 1, 1, 0
999012, 1, 1, 0
*End load case
*Load case, name=shear23onlytensor
*BOUNDARY
999011, 1, 1, 0
999022, 1, 1, 0
999033, 1, 1, 0
999023, 1, 1, 1
999013, 1, 1, 0
999012, 1, 1, 0
*End load case
*Load case, name=shear13onlytensor
*BOUNDARY
999011, 1, 1, 0
999022, 1, 1, 0
999033, 1, 1, 0
999023, 1, 1, 0
999013, 1, 1, 1
999012, 1, 1, 0
*End load case
*Load case, name=shear12onlytensor
*BOUNDARY
999011, 1, 1, 0
999022, 1, 1, 0
999033, 1, 1, 0
999023, 1, 1, 0
999013, 1, 1, 0
999012, 1, 1, 1
*End load case
**
*Restart, write, frequency=0
*Output, field, variable=PRESELECT
*Output, history, variable=PRESELECT
*El Print, freq=999999
*Node Print, NSET=DUMMY, freq=1
U1, U2, U3, RF1, RF2, RF3, CF1, CF2, CF3

**
*END STEP
